P := [40; 80; 120; 160; 200; 240; 280]
T1 := [465.44; 433.52; 424.62; 420.271; 417.61; 415.829; 414.54]
T2 := [453.96; 417.87; 407.814; 402.88; 399.883; 397.86; 396.410]
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P1 := [40; 80; 120; 160; 200; 240; 280]
P2 := [40; 80; 120; 160; 200; 240; 280]
T11 := [
    465.44; 447.70; 440.97; 436.2; 433.38; 431.30; 429.75; 443.407; 433.52; 428.50
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]
T12 := [
    453.96; 433.905; 425.76; 420.99; 417.71; 415.36; 413.611; 429.046; 417.87; 412.192
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]
# [component: inputs T11]
